*Heading
** Job name: CWSand_01 Model name: Sandwich
** Generated by: Abaqus/CAE 6.9-EFR
*Preprint, echo=NO, model=NO, history=NO, contact=NO
**
** PARTS
**
*Part, name=Bottom-Plate
*Node
      1,         305.,           0.,           0.
      2,   295.161285,           0.,           0.
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*Element, type=C3D8R
   1,   33,   34,    2,    1, 1057, 1058, 1026, 1025
   2,   34,   35,    3,    2, 1058, 1059, 1027, 1026
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*Nset, nset=ALL, generate
    1,  6144,     1
*Elset, elset=ALL, generate
    1,  4805,     1
*Nset, nset=Top-Surf, generate
 5121,  6144,     1
*Elset, elset=Top-Surf, generate
 3845,  4805,     1
*Nset, nset=Bottom-Surf, generate
    1,  1024,     1
*Elset, elset=Bottom-Surf, generate
   1,  961,    1
*Nset, nset=x0, generate
   32,  6144,    32
*Nset, nset=xL, generate
    1,  6113,    32
*Nset, nset=y0
    1,    2,    3,    4,    5,    6
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*Elset, elset=_Bottom_S1, internal, generate
   1,  961,    1
*Surface, type=ELEMENT, name=Bottom
_Bottom_S1, S1
*Elset, elset=_Top_S2, internal, generate
 3845,  4805,     1
*Surface, type=ELEMENT, name=Top
_Top_S2, S2
** Section: Solid-Plate
*Solid Section, elset=ALL, material=Steel_49Fe-24Ni-21Cr-6Mo_wt
,
*End Part
**
*Part, name=Honeycomb
*Node
      1,         30.5,        274.5,          51.
      2,         30.5,        274.5,           0.
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*Element, type=S4R
  1,    1,  235, 5428,  302
  2,  235,  236, 5429, 5428
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*Nset, nset=ALL, generate
     1,  31527,      1
*Elset, elset=ALL, generate
     1,  32400,      1
*Nset, nset=Top
    1,    4,    5,    7,    9,   11
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*Elset, elset=Top
     1,    31,    61,    91,   121,   151
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*Nset, nset=Bottom
    2,    3,    6,    8,   10,   12
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*Elset, elset=Bottom
    30,    60,    90,   120,   150,   180
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** Section: Shell-Honeycomb
*Shell Section, elset=ALL, material=Steel_49Fe-24Ni-21Cr-6Mo_wt
0.76, 5
*End Part
**
*Part, name=Top-Plate
*Node
      1,         305.,           0.,           0.
      2,   295.161285,           0.,           0.
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*Element, type=C3D8R
   1,   33,   34,    2,    1, 1057, 1058, 1026, 1025
   2,   34,   35,    3,    2, 1058, 1059, 1027, 1026
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*Nset, nset=ALL, generate
    1,  6144,     1
*Elset, elset=ALL, generate
    1,  4805,     1
*Nset, nset=Top-Surf, generate
 5121,  6144,     1
*Elset, elset=Top-Surf, generate
 3845,  4805,     1
*Nset, nset=Bottom-Surf, generate
    1,  1024,     1
*Elset, elset=Bottom-Surf, generate
   1,  961,    1
*Nset, nset=x0, generate
   32,  6144,    32
*Nset, nset=xL, generate
    1,  6113,    32
*Nset, nset=y0
    1,    2,    3,    4,    5,    6
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*Elset, elset=_Bottom_S1, internal, generate
   1,  961,    1
*Surface, type=ELEMENT, name=Bottom
_Bottom_S1, S1
*Elset, elset=_Top_S2, internal, generate
 3845,  4805,     1
*Surface, type=ELEMENT, name=Top
_Top_S2, S2
** Section: Solid-Plate
*Solid Section, elset=ALL, material=Steel_49Fe-24Ni-21Cr-6Mo_wt
,
*End Part
**
**
** ASSEMBLY
**
*Assembly, name=Assembly
**
*Instance, name=Honeycomb-1, part=Honeycomb
          0.,           0.,           5.
*End Instance
**
*Instance, name=Bottom-Plate-1, part=Bottom-Plate
*End Instance
**
*Instance, name=Top-Plate-1, part=Top-Plate
          0.,           0.,          56.
*End Instance
**
*Nset, nset=Right-Clamped, instance=Honeycomb-1
   43,   44,  219,  220,  221,  222
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*Nset, nset=Right-Clamped, instance=Bottom-Plate-1, generate
    1,  6113,    32
*Nset, nset=Right-Clamped, instance=Top-Plate-1, generate
    1,  6113,    32
*Elset, elset=Right-Clamped, instance=Honeycomb-1
  3571,  3572,  3573,  3574,  3575,  3576
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*Elset, elset=Right-Clamped, instance=Bottom-Plate-1, generate
    1,  4775,    31
*Elset, elset=Right-Clamped, instance=Top-Plate-1, generate
    1,  4775,    31
*Nset, nset=Bottom-Y-Symm, instance=Honeycomb-1
   21,   22,   91,   92,  109,  110
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*Nset, nset=Bottom-Y-Symm, instance=Bottom-Plate-1
    1,    2,    3,    4,    5,    6
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*Nset, nset=Bottom-Y-Symm, instance=Top-Plate-1
    1,    2,    3,    4,    5,    6
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*Elset, elset=Bottom-Y-Symm, instance=Honeycomb-1
  1591,  1592,  1593,  1594,  1595,  1596
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*Elset, elset=Bottom-Y-Symm, instance=Bottom-Plate-1
    1,    2,    3,    4,    5,    6
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*Elset, elset=Bottom-Y-Symm, instance=Top-Plate-1
    1,    2,    3,    4,    5,    6
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*Nset, nset=Top-Clamped, instance=Honeycomb-1
    3,    4,   77,   78,   95,   96
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*Nset, nset=Top-Clamped, instance=Bottom-Plate-1
  993,  994,  995,  996,  997,  998
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*Nset, nset=Top-Clamped, instance=Top-Plate-1
  993,  994,  995,  996,  997,  998
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*Nset, nset=Left-X-Symm, instance=Honeycomb-1
  23,  24,  25,  26,  27,  28
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*Nset, nset=Left-X-Symm, instance=Bottom-Plate-1, generate
   32,  6144,    32
*Nset, nset=Left-X-Symm, instance=Top-Plate-1, generate
   32,  6144,    32
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*Nset, nset=QA_test_Top-Center, instance=Top-Plate-1
 5152,
*Nset, nset=QA_test_Bottom-Center, instance=Bottom-Plate-1
 32,
*Surface, type=NODE, name=Honeycomb-1_Bottom_CNS_, internal
Honeycomb-1.Bottom, 1.
*Surface, type=NODE, name=Honeycomb-1_Top_CNS_, internal
Honeycomb-1.Top, 1.
**======================================
**  Defining welds with tie constraint
**======================================
** Constraint: Bottom-Weld
*Tie, name=Bottom-Weld, adjust=no, tied nset=Honeycomb-1.Bottom
Honeycomb-1_Bottom_CNS_, Bottom-Plate-1.Top
** Constraint: Top-Weld
*Tie, name=Top-Weld, adjust=no, tied nset=Honeycomb-1.Top
Honeycomb-1_Top_CNS_, Top-Plate-1.Bottom
**======================================
*Node
9909099,           0.,           0.,         161.0
*Nset, nset=BLAST-SOURCE
9909099,
*End Assembly
**
** MATERIALS
**
** High-ductility Stainles Steel Alloy with 49% Fe, 24%Ni, 21%Cr, 6%Mo by
** weight.
*Material, name=Steel_49Fe-24Ni-21Cr-6Mo_wt
**----------------------------------
** Material Prop. for AL-6XN Steel
**----------------------------------
*Density
 7.85e-09,
*Elastic
 161.0e+03, 0.35
*Plastic, hardening=Johnson Cook
 400.0, 1500.0, 0.40, 1.20, 1800.0, 293.0
*Rate Dependent, type=Johnson Cook
 0.045, 0.001
*Specific Heat
 452e+6
*Initial Condition, type=temperature
 Top-Plate-1.ALL, 273.0
 Bottom-Plate-1.ALL, 273.0
 Honeycomb-1.ALL, 273.0
**----------------------------------
**
** BOUNDARY CONDITIONS
**
** Name: Bottom-Y-Symm Type: Symmetry/Antisymmetry/Encastre
*Boundary
Bottom-Y-Symm, YSYMM
** Name: Left-X-Symm Type: Symmetry/Antisymmetry/Encastre
*Boundary
Left-X-Symm, XSYMM
** Name: Right-Clamped Type: Symmetry/Antisymmetry/Encastre
*Boundary
Right-Clamped, ENCASTRE
** Name: Top-Clamped Type: Symmetry/Antisymmetry/Encastre
*Boundary
Top-Clamped, ENCASTRE
**
** INCIDENT WAVE PROPERTY
**
*Incident Wave Interaction Property, Name=BLAST, Type=AIR BLAST
*Conwep Charge Property
1.0e-03, 1.0e+03
1.0e-03, 1.0, 1.0e+6
** --------- Defining General Contact ---------------
*Contact
*Contact inclusions, ALL EXTERIOR
** --------------------------------------------------
**
** STEP: Blast-Dynamic-Explicit
**
*Step, name=Blast-Dynamic-Explicit
Blast Loading (CONWEP) on Top of the Sandwich Structure
*Dynamic, Explicit
, 0.0015
*Bulk Viscosity
0.06, 1.2
*Incident Wave Interaction, Property=BLAST, Conwep
Top-Plate-1.Top, Blast-Source, , 0.0, 1.0
**
** OUTPUT REQUESTS
**
*Restart, write, number interval=1, time marks=NO
**
** FIELD OUTPUT: F-Output-2
**
***Output, field, time interval=1.0e-5
*Output, field, number inter=4
*Element Output, directions=YES
NFORC, P
*Element Output
TEMP
**
** FIELD OUTPUT: F-Output-1
**
*Output, field, variable=PRESELECT, number interval=4
***Output, field, variable=PRESELECT, time interval=1.0e-5
**
** HISTORY OUTPUT: Bottom-Center-History
**
*Output, history, time interval=2.5e-4
*Node Output, nset=QA_test_Bottom-Center
UT
**
** HISTORY OUTPUT: Top-Center-History
**
*Node Output, nset=QA_test_Top-Center
UT
**----------------------------------------
**
** HISTORY OUTPUT: H-Output-1
**
*Output, history, variable=PRESELECT
*End Step
